OpenVSP model (file version 5), 7 components.
Geometry view with OpenVSP parameter names; values to 6 digits, angles in degrees, lengths in the model's unit.
Overall bounding box: X_Min=97 X_Len=352.8 Y_Min=-331.5 Y_Len=663 Z_Min=56.7 Z_Len=95.9925

Fuselage "Fuselage"
  location (X Y Z) 97 0 103.5, rotation 0 0 0
  bounding box size 352.8 40 51.8024
  Design: Length=352.8
  cross sections:
    n  XLocPercent  YLocPercent  ZLocPercent  shape
    0  0            0            0            point
    1  0.25         0            0.0327869    ellipse Ellipse_Height=47.9 Ellipse_Width=40
    2  0.396825     0            0.0163934    ellipse Ellipse_Height=35 Ellipse_Width=36.2
    3  0.75         0            0.0163934    ellipse Ellipse_Height=35 Ellipse_Width=34.2
    4  1            0            0            point

Wing "MainWing", child of "Fuselage"
  location (X Y Z) 231 0 112.5, rotation 0 7 0; relative location 134 0 9, rotation 0 7 0
  symmetric about XZ
  bounding box size 60.7188 663 16.3059
  totals: TotalSpan=663 TotalProjectedSpan=663 TotalChord=60 TotalArea=39780 TotalAR=11.05 MAC=60
  root: chord 60, twist 0, NACA 5-digit CamberLoc=0.15 IdealCl=0.3 ThickChord=0.15
  sections:
    n  Span   Root_Chord  Tip_Chord  Area   Sweep  Sweep_Location  Dihedral  Twist  Twist_Location  tip airfoil
    1  331.5  60          60         19890  0      0               0         0      0.25            NACA 4-series Camber=0 CamberLoc=0.2 ThickChord=0.1

Propeller "SuperProp", child of "MainWing"
  location (X Y Z) 221 300 112.5, rotation 0 0 0; relative location -10 300 0, rotation 0 0 0
  symmetric about XZ
  bounding box size 2.48485 650.09 50
  Design: Diameter=50 NumBlade=3 Beta34=20 UseBeta34Flag=1 Feather=0 Rotate=0 Precone=0 ReverseFlag=0 FoldAngle=0 PropMode=1 AF=151.538 CLi=0.538798 Chord=0.177656 Solidity=0.169649 ConstructXoC=0.5 FeatherAxisXoC=0.5 FeatherOffsetXoC=0
  cross sections:
    n  RadiusFrac  shape
    0  0.2         ellipse Ellipse_Height=1 Ellipse_Width=2
    1  0.4         NACA 16-series Chord=4.15625 IdealCl=0.7 ThickChord=0.144074
    2  1           NACA 16-series Chord=3.25 IdealCl=0.2 ThickChord=0.03
  Chord along r/R (cubic Bezier): 0.2: 0.08, 0.333333: 0.15, 0.466667: 0.2, 0.6: 0.2, 0.716667: 0.2, 0.833333: 0.2, 0.95: 0.2, 0.966667: 0.2, 0.983333: 0.2, 1: 0.13
  Twist along r/R (PCHIP): 0.2: 46.75, 0.75: 20, 1: 13
  Thick along r/R (cubic Bezier): 0.2: 0.5, 0.233333: 0.3, 0.266667: 0.225, 0.3: 0.2, 0.4: 0.125, 0.5: 0.115, 0.6: 0.1, 0.733333: 0.075, 0.866667: 0.055, 1: 0.03
  CLI along r/R (cubic Bezier): 0.2: 0, 0.266667: 0.7, 0.333333: 0.7, 0.4: 0.7, 0.466667: 0.7, 0.533333: 0.7, 0.6: 0.7, 0.733333: 0.7, 0.866667: 0.7, 1: 0.2

Wing "DiagTail", child of "Fuselage"
  location (X Y Z) 360.4 0 103.5, rotation 0 5.6 0; relative location 263.4 0 0, rotation 0 5.6 0
  symmetric about XZ
  bounding box size 68.7866 244.88 59.5133
  totals: TotalSpan=262 TotalProjectedSpan=243.769 TotalChord=55.425 TotalArea=12900 TotalAR=4.60649 MAC=51.5347
  root: chord 63.8, twist 0, NACA 5-digit CamberLoc=0.15 IdealCl=0.3 ThickChord=0.15
  sections:
    n  Span   Root_Chord  Tip_Chord  Area     Sweep  Sweep_Location  Dihedral  Twist  Twist_Location  tip airfoil
    1  17.1   63.8        63.8       1090.98  0      0               21.5      0      0.25            NACA 4-series Camber=0 CamberLoc=0.2 ThickChord=0.1
    2  113.9  63.8        30.3       5358.99  15.5   0               21.5      0      0.25            as above

Wing "VentralTail", child of "Fuselage"
  location (X Y Z) 360.8 0 103.5, rotation -90 0 0; relative location 263.8 0 0, rotation -90 0 0
  bounding box size 66.927 7.38334 46.8
  totals: TotalSpan=46.8 TotalProjectedSpan=46.8 TotalChord=54.7 TotalArea=2437.56 TotalAR=0.898538 MAC=53.6606
  root: chord 61.5, twist 0, NACA 4-series Camber=0 CamberLoc=0.2 ThickChord=0.12
  sections:
    n  Span  Root_Chord  Tip_Chord  Area     Sweep  Sweep_Location  Dihedral  Twist  Twist_Location  tip airfoil
    1  14.4  61.5        61.5       885.6    0      0               0         0      0.25            NACA 4-series Camber=0 CamberLoc=0.2 ThickChord=0.1
    2  32.4  61.5        34.3       1551.96  45.2   0               0         0      0.25            as above

Propeller "PusherProp", child of "Fuselage"
  location (X Y Z) 437 0 103.5, rotation 0 0 0; relative location 340 0 0, rotation 0 0 0
  bounding box size 2.98182 60.0541 60
  Design: Diameter=60 NumBlade=3 Beta34=20 UseBeta34Flag=1 Feather=0 Rotate=0 Precone=0 ReverseFlag=0 FoldAngle=0 PropMode=1 AF=151.538 CLi=0.538798 Chord=0.177656 Solidity=0.169649 ConstructXoC=0.5 FeatherAxisXoC=0.5 FeatherOffsetXoC=0
  cross sections:
    n  RadiusFrac  shape
    0  0.2         ellipse Ellipse_Height=1.2 Ellipse_Width=2.4
    1  0.4         NACA 16-series Chord=4.9875 IdealCl=0.7 ThickChord=0.144074
    2  1           NACA 16-series Chord=3.9 IdealCl=0.2 ThickChord=0.03
  blade curves as in "SuperProp"

Mesh "MeshGeom"
  location (X Y Z) 0 0 0, rotation 0 0 0
  bounding box size 352.8 663 91.5001
  triangle mesh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
