OpenVSP model (file version 5), 42 components.
Geometry view with OpenVSP parameter names; values to 6 digits, angles in degrees, lengths in the model's unit.
Overall bounding box: X_Min=0 X_Len=449.8 Y_Min=-331.976 Y_Len=663.953 Z_Min=0 Z_Len=152.692

Fuselage "Fuselage"
  location (X Y Z) 97 0 103.5, rotation 0 0 0
  bounding box size 352.8 51.1811 51.1811
  Design: Length=352.8
  cross sections:
    n  XLocPercent  YLocPercent  YRotate  ZLocPercent  shape
    0  0            0            0        -0.0200868   point
    1  0.181799     0            0        0.0100434    ellipse Ellipse_Height=51.1811 Ellipse_Width=51.1811
    2  0.396825     0            0        -0.0100434   ellipse Ellipse_Height=31.4961 Ellipse_Width=39.3701
    3  0.75         0            0        -0.0100434   ellipse Ellipse_Height=31.4961 Ellipse_Width=34.2
    4  1            0            -6       0            point

Propeller "PusherProp", child of "Fuselage"
  location (X Y Z) 437 0 103.5, rotation 0 0 0; relative location 340 0 0, rotation 0 0 0
  bounding box size 2.98182 60.0541 60
  Design: Diameter=60 NumBlade=3 Beta34=20 UseBeta34Flag=1 Feather=0 Rotate=0 Precone=0 ReverseFlag=0 FoldAngle=0 PropMode=1 AF=151.538 CLi=0.538798 Chord=0.177656 Solidity=0.169649 ConstructXoC=0.5 FeatherAxisXoC=0.5 FeatherOffsetXoC=0
  cross sections:
    n  RadiusFrac  shape
    0  0.2         ellipse Ellipse_Height=1.2 Ellipse_Width=2.4
    1  0.4         NACA 16-series Chord=4.9875 IdealCl=0.7 ThickChord=0.144074
    2  1           NACA 16-series Chord=3.9 IdealCl=0.2 ThickChord=0.03
  Chord along r/R (cubic Bezier): 0.2: 0.08, 0.333333: 0.15, 0.466667: 0.2, 0.6: 0.2, 0.716667: 0.2, 0.833333: 0.2, 0.95: 0.2, 0.966667: 0.2, 0.983333: 0.2, 1: 0.13
  Twist along r/R (PCHIP): 0.2: 46.75, 0.75: 20, 1: 13
  Thick along r/R (cubic Bezier): 0.2: 0.5, 0.233333: 0.3, 0.266667: 0.225, 0.3: 0.2, 0.4: 0.125, 0.5: 0.115, 0.6: 0.1, 0.733333: 0.075, 0.866667: 0.055, 1: 0.03
  CLI along r/R (cubic Bezier): 0.2: 0, 0.266667: 0.7, 0.333333: 0.7, 0.4: 0.7, 0.466667: 0.7, 0.533333: 0.7, 0.6: 0.7, 0.733333: 0.7, 0.866667: 0.7, 1: 0.2

Wing "MainWing", child of "Fuselage"
  location (X Y Z) 231 0 112.5, rotation 0 0 0; relative location 134 0 9, rotation 0 0 0
  symmetric about XZ
  bounding box size 59.574 663.953 20.6551
  totals: TotalSpan=663.974 TotalProjectedSpan=663.57 TotalChord=60 TotalArea=39838.5 TotalAR=11.0528 MAC=60
  root: chord 60, twist 7, NACA 5-digit CamberLoc=0.15 IdealCl=0.3 ThickChord=0.15
  sections:
    n  Span     Root_Chord  Tip_Chord  Area     Sweep  Sweep_Location  Dihedral  Twist  Twist_Location  tip airfoil
    1  24.6     60          60         1476     0      0               2         7      0.25            NACA 4-series Camber=0 CamberLoc=0.2 ThickChord=0.1
    2  89.5045  60          60         5370.27  0      0               2         7      0.25            as above
    3  89.5045  60          60         5370.27  0      0               2         7      0.25            as above
    4  55.784   60          60         3347.04  0      0               2         7      0.25            as above
    5  55.784   60          60         3347.04  0      0               2         7      0.25            as above
    6  16.8102  60          60         1008.61  0      0               2         7      0.25            as above
  SS_Control "Flap": UStart=0.25 UEnd=0.5 Length_C_Start=0.3 Length_C_End=0.3 Length_Start=18 Length_End=18 LE_Flag=0 Surf_Type=2
  SS_Control "Aileron": UStart=0.5 UEnd=0.625 Length_C_Start=0.3 Length_C_End=0.3 Length_Start=18 Length_End=18 LE_Flag=0 Surf_Type=2
  SS_Control "Aileron": UStart=0.625 UEnd=0.75 Length_C_Start=0.3 Length_C_End=0.3 Length_Start=18 Length_End=18 LE_Flag=0 Surf_Type=2

Fuselage "HL_Spinner", child of "MainWing"
  location (X Y Z) 214.896 59.325 105.572, rotation 0 0 0; relative location -16.104 59.325 -6.92833, rotation 0 0 0
  symmetric about XZ
  bounding box size 8.4 125.01 6.36
  Design: Length=8.4
  cross sections:
    n  XLocPercent  YLocPercent  ZLocPercent  shape
    0  0            0            0            point
    1  0.714286     0            0            circle Circle_Diameter=6.12
    2  1            0            0            circle Circle_Diameter=6.36
    3  1            0            0            point

Propeller "HLProp", child of "HL_Spinner"
  location (X Y Z) 220.896 59.325 105.572, rotation 0 0 0; relative location 6 0 0, rotation 0 0 0
  symmetric about XZ
  bounding box size 2.9789 141.324 22.674
  Design: Diameter=22.674 NumBlade=5 Beta34=27.3508 UseBeta34Flag=0 Feather=0 Rotate=0 Precone=0 ReverseFlag=0 FoldAngle=0 PropMode=1 AF=88.8008 CLi=0 Chord=0.159309 Solidity=0.253548 ConstructXoC=0.5 FeatherAxisXoC=0.5 FeatherOffsetXoC=0
  cross sections:
    n  RadiusFrac  shape
    0  0.20238     airfoil file "MH 114  13.02%"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 BaseThickChord=0.130507 Chord=1.48231 ThickChord=0.130507
    1  1           airfoil file "MH 114  13.02%"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 BaseThickChord=0.130507 Chord=0.234789 ThickChord=0.130507
  Chord along r/R (PCHIP): 0.20238: 0.13075, 0.20949: 0.13826, 0.22302: 0.15592, 0.24183: 0.17996, 0.26472: 0.20629, 0.29061: 0.23252, 0.31863: 0.2513, 0.34811: 0.25606, 0.37855: 0.2487, 0.40957: 0.23683, 0.44087: 0.22226, 0.47223: 0.2032, 0.50345: 0.18641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
  Twist along r/R (PCHIP): 0.20238: 69.838, 0.20949: 68.892, 0.22302: 67.101, 0.24183: 64.648, 0.26472: 61.758, 0.29061: 58.582, 0.31863: 55.211, 0.34811: 51.651, 0.37855: 48.04, 0.40957: 44.752, 0.44087: 41.977, 0.47223: 39.596, 0.50345: 37.492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
  Rake along r/R (PCHIP): 0.20238: -0.0537394, 0.20949: -0.0515495, 0.22302: -0.0472413, 0.24183: -0.0422592, 0.26472: -0.0384137, 0.29061: -0.0369596, 0.31863: -0.0386142, 0.34811: -0.0426084, 0.37855: -0.0469638, 0.40957: -0.0500138, 0.44087: -0.0507984, 0.47223: -0.0502329, 0.50345: -0.0500241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
  Skew along r/R (PCHIP): 0.20238: 0.126043, 0.20949: 0.122793, 0.22302: 0.116549, 0.24183: 0.107814, 0.26472: 0.09727, 0.29061: 0.0853985, 0.31863: 0.072512, 0.34811: 0.0586314, 0.37855: 0.0443212, 0.40957: 0.0311363, 0.44087: 0.0199271, 0.47223: 0.0102711, 0.50345: 0.00172324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
  Thick along r/R (linear): 0.20238: 0.130507, 1: 0.130507

Fuselage "HL_Motor", child of "HL_Spinner"
  location (X Y Z) 223.296 59.325 105.572, rotation 0 0 0; relative location 0 0 0, rotation 0 0 0
  symmetric about XZ
  bounding box size 2.64 125.01 6.36
  Design: Length=2.64
  cross sections:
    n  XLocPercent  YLocPercent  ZLocPercent  shape
    0  0            0            0            point
    1  0            0            0            circle Circle_Diameter=6.36
    2  1            0            0            as above
    3  1            0            0            point

Fuselage "HL_Motor_Controller_Interface", child of "HL_Motor"
  location (X Y Z) 225.936 59.325 105.572, rotation 0 0 0; relative location 0 0 0, rotation 0 0 0
  symmetric about XZ
  bounding box size 2.409 125.01 6.36
  Design: Length=2.409
  cross sections:
    n  XLocPercent  YLocPercent  ZLocPercent  shape
    0  0            0            0            point
    1  0            0            0            circle Circle_Diameter=6.36
    2  1            0            0            as above
    3  1            0            0            point

Fuselage "HLNacelle_12_Tail", child of "HL_Motor_Controller_Interface"
  location (X Y Z) 228.345 59.325 105.572, rotation 0 0 0; relative location 0 9.54001e-06 0, rotation 0 0 0
  symmetric about XZ
  bounding box size 21.5308 125.01 7.1576
  Design: Length=21.5002
  cross sections:
    n  XLocPercent  YLocPercent  ZLocPercent  shape
    0  0            0            0            point
    1  0            0            0            circle Circle_Diameter=6.36
    2  0.0697669    0            0            as above
    3  0.307817     0            0            as above
    4  0.995351     0            0.061127     ellipse Ellipse_Height=3.33 Ellipse_Width=0.25212
    5  1            0            0.061127     point

Fuselage "HL_Spinner", child of "MainWing"
  location (X Y Z) 214.896 114.05 107.483, rotation 0 0 0; relative location -16.104 114.05 -5.01729, rotation 0 0 0
  symmetric about XZ
  bounding box size 8.4 234.46 6.36
  Design: Length=8.4
  cross sections:
    n  XLocPercent  YLocPercent  ZLocPercent  shape
    0  0            0            0            point
    1  0.714286     0            0            circle Circle_Diameter=6.12
    2  1            0            0            circle Circle_Diameter=6.36
    3  1            0            0            point

Propeller "HLProp", child of "HL_Spinner"
  location (X Y Z) 220.896 114.05 107.483, rotation 0 0 0; relative location 6 0 0, rotation 0 0 0
  symmetric about XZ
  bounding box size 2.9789 250.774 22.674
  Design: Diameter=22.674 NumBlade=5 Beta34=27.3508 UseBeta34Flag=0 Feather=0 Rotate=0 Precone=0 ReverseFlag=0 FoldAngle=0 PropMode=1 AF=88.8008 CLi=0 Chord=0.159309 Solidity=0.253548 ConstructXoC=0.5 FeatherAxisXoC=0.5 FeatherOffsetXoC=0
  cross sections:
    n  RadiusFrac  shape
    0  0.20238     airfoil file "MH 114  13.02%"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 BaseThickChord=0.130507 Chord=1.48231 ThickChord=0.130507
    1  1           airfoil file "MH 114  13.02%"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 BaseThickChord=0.130507 Chord=0.234789 ThickChord=0.130507
  blade curves as in "HLProp"

Fuselage "HL_Motor", child of "HL_Spinner"
  location (X Y Z) 223.296 114.05 107.483, rotation 0 0 0; relative location 0 0 0, rotation 0 0 0
  symmetric about XZ
  bounding box size 2.64 234.46 6.36
  Design: Length=2.64
  cross sections:
    n  XLocPercent  YLocPercent  ZLocPercent  shape
    0  0            0            0            point
    1  0            0            0            circle Circle_Diameter=6.36
    2  1            0            0            as above
    3  1            0            0            point

Fuselage "HL_Motor_Controller_Interface", child of "HL_Motor"
  location (X Y Z) 225.936 114.05 107.483, rotation 0 0 0; relative location 0 0 0, rotation 0 0 0
  symmetric about XZ
  bounding box size 2.409 234.46 6.36
  Design: Length=2.409
  cross sections:
    n  XLocPercent  YLocPercent  ZLocPercent  shape
    0  0            0            0            point
    1  0            0            0            circle Circle_Diameter=6.36
    2  1            0            0            as above
    3  1            0            0            point

Fuselage "HLNacelle_12_Tail", child of "HL_Motor_Controller_Interface"
  location (X Y Z) 228.345 114.05 107.483, rotation 0 0 0; relative location 0 9.54001e-06 0, rotation 0 0 0
  symmetric about XZ
  bounding box size 21.5308 234.46 7.1576
  Design: Length=21.5002
  cross sections:
    n  XLocPercent  YLocPercent  ZLocPercent  shape
    0  0            0            0            point
    1  0            0            0            circle Circle_Diameter=6.36
    2  0.0697669    0            0            as above
    3  0.307817     0            0            as above
    4  0.995351     0            0.061127     ellipse Ellipse_Height=3.33 Ellipse_Width=0.25212
    5  1            0            0.061127     point

Fuselage "HL_Spinner", child of "MainWing"
  location (X Y Z) 214.896 168.775 109.394, rotation 0 0 0; relative location -16.104 168.775 -3.10625, rotation 0 0 0
  symmetric about XZ
  bounding box size 8.4 343.91 6.36
  Design: Length=8.4
  cross sections:
    n  XLocPercent  YLocPercent  ZLocPercent  shape
    0  0            0            0            point
    1  0.714286     0            0            circle Circle_Diameter=6.12
    2  1            0            0            circle Circle_Diameter=6.36
    3  1            0            0            point

Propeller "HLProp", child of "HL_Spinner"
  location (X Y Z) 220.896 168.775 109.394, rotation 0 0 0; relative location 6 0 0, rotation 0 0 0
  symmetric about XZ
  bounding box size 2.9789 360.224 22.674
  Design: Diameter=22.674 NumBlade=5 Beta34=27.3508 UseBeta34Flag=0 Feather=0 Rotate=0 Precone=0 ReverseFlag=0 FoldAngle=0 PropMode=1 AF=88.8008 CLi=0 Chord=0.159309 Solidity=0.253548 ConstructXoC=0.5 FeatherAxisXoC=0.5 FeatherOffsetXoC=0
  cross sections:
    n  RadiusFrac  shape
    0  0.20238     airfoil file "MH 114  13.02%"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 BaseThickChord=0.130507 Chord=1.48231 ThickChord=0.130507
    1  1           airfoil file "MH 114  13.02%"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 BaseThickChord=0.130507 Chord=0.234789 ThickChord=0.130507
  blade curves as in "HLProp"

Fuselage "HL_Motor", child of "HL_Spinner"
  location (X Y Z) 223.296 168.775 109.394, rotation 0 0 0; relative location 0 0 0, rotation 0 0 0
  symmetric about XZ
  bounding box size 2.64 343.91 6.36
  Design: Length=2.64
  cross sections:
    n  XLocPercent  YLocPercent  ZLocPercent  shape
    0  0            0            0            point
    1  0            0            0            circle Circle_Diameter=6.36
    2  1            0            0            as above
    3  1            0            0            point

Fuselage "HL_Motor_Controller_Interface", child of "HL_Motor"
  location (X Y Z) 225.936 168.775 109.394, rotation 0 0 0; relative location 0 0 0, rotation 0 0 0
  symmetric about XZ
  bounding box size 2.409 343.91 6.36
  Design: Length=2.409
  cross sections:
    n  XLocPercent  YLocPercent  ZLocPercent  shape
    0  0            0            0            point
    1  0            0            0            circle Circle_Diameter=6.36
    2  1            0            0            as above
    3  1            0            0            point

Fuselage "HLNacelle_12_Tail", child of "HL_Motor_Controller_Interface"
  location (X Y Z) 228.345 168.775 109.394, rotation 0 0 0; relative location 0 9.54001e-06 0, rotation 0 0 0
  symmetric about XZ
  bounding box size 21.5308 343.91 7.1576
  Design: Length=21.5002
  cross sections:
    n  XLocPercent  YLocPercent  ZLocPercent  shape
    0  0            0            0            point
    1  0            0            0            circle Circle_Diameter=6.36
    2  0.0697669    0            0            as above
    3  0.307817     0            0            as above
    4  0.995351     0            0.061127     ellipse Ellipse_Height=3.33 Ellipse_Width=0.25212
    5  1            0            0.061127     point

Fuselage "HL_Spinner", child of "MainWing"
  location (X Y Z) 214.896 231.45 111.582, rotation 0 0 0; relative location -16.104 231.45 -0.917588, rotation 0 0 0
  symmetric about XZ
  bounding box size 8.4 469.26 6.36
  Design: Length=8.4
  cross sections:
    n  XLocPercent  YLocPercent  ZLocPercent  shape
    0  0            0            0            point
    1  0.714286     0            0            circle Circle_Diameter=6.12
    2  1            0            0            circle Circle_Diameter=6.36
    3  1            0            0            point

Propeller "HLProp", child of "HL_Spinner"
  location (X Y Z) 220.896 231.45 111.582, rotation 0 0 0; relative location 6 0 0, rotation 0 0 0
  symmetric about XZ
  bounding box size 2.9789 485.574 22.674
  Design: Diameter=22.674 NumBlade=5 Beta34=27.3508 UseBeta34Flag=0 Feather=0 Rotate=0 Precone=0 ReverseFlag=0 FoldAngle=0 PropMode=1 AF=88.8008 CLi=0 Chord=0.159309 Solidity=0.253548 ConstructXoC=0.5 FeatherAxisXoC=0.5 FeatherOffsetXoC=0
  cross sections:
    n  RadiusFrac  shape
    0  0.20238     airfoil file "MH 114  13.02%"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 BaseThickChord=0.130507 Chord=1.48231 ThickChord=0.130507
    1  1           airfoil file "MH 114  13.02%"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 BaseThickChord=0.130507 Chord=0.234789 ThickChord=0.130507
  blade curves as in "HLProp"

Fuselage "HL_Motor", child of "HL_Spinner"
  location (X Y Z) 223.296 231.45 111.582, rotation 0 0 0; relative location 0 0 0, rotation 0 0 0
  symmetric about XZ
  bounding box size 2.64 469.26 6.36
  Design: Length=2.64
  cross sections:
    n  XLocPercent  YLocPercent  ZLocPercent  shape
    0  0            0            0            point
    1  0            0            0            circle Circle_Diameter=6.36
    2  1            0            0            as above
    3  1            0            0            point

Fuselage "HL_Motor_Controller_Interface", child of "HL_Motor"
  location (X Y Z) 225.936 231.45 111.582, rotation 0 0 0; relative location 0 0 0, rotation 0 0 0
  symmetric about XZ
  bounding box size 2.409 469.26 6.36
  Design: Length=2.409
  cross sections:
    n  XLocPercent  YLocPercent  ZLocPercent  shape
    0  0            0            0            point
    1  0            0            0            circle Circle_Diameter=6.36
    2  1            0            0            as above
    3  1            0            0            point

Fuselage "HLNacelle_12_Tail", child of "HL_Motor_Controller_Interface"
  location (X Y Z) 228.345 231.45 111.582, rotation 0 0 0; relative location 0 9.54001e-06 0, rotation 0 0 0
  symmetric about XZ
  bounding box size 21.5308 469.26 7.1576
  Design: Length=21.5002
  cross sections:
    n  XLocPercent  YLocPercent  ZLocPercent  shape
    0  0            0            0            point
    1  0            0            0            circle Circle_Diameter=6.36
    2  0.0697669    0            0            as above
    3  0.307817     0            0            as above
    4  0.995351     0            0.061127     ellipse Ellipse_Height=3.33 Ellipse_Width=0.25212
    5  1            0            0.061127     point

Fuselage "HL_Spinner", child of "MainWing"
  location (X Y Z) 214.896 287.2 113.529, rotation 0 0 0; relative location -16.104 287.2 1.02924, rotation 0 0 0
  symmetric about XZ
  bounding box size 8.4 580.76 6.36
  Design: Length=8.4
  cross sections:
    n  XLocPercent  YLocPercent  ZLocPercent  shape
    0  0            0            0            point
    1  0.714286     0            0            circle Circle_Diameter=6.12
    2  1            0            0            circle Circle_Diameter=6.36
    3  1            0            0            point

Propeller "HLProp", child of "HL_Spinner"
  location (X Y Z) 220.896 287.2 113.529, rotation 0 0 0; relative location 6 0 0, rotation 0 0 0
  symmetric about XZ
  bounding box size 2.9789 597.074 22.674
  Design: Diameter=22.674 NumBlade=5 Beta34=27.3508 UseBeta34Flag=0 Feather=0 Rotate=0 Precone=0 ReverseFlag=0 FoldAngle=0 PropMode=1 AF=88.8008 CLi=0 Chord=0.159309 Solidity=0.253548 ConstructXoC=0.5 FeatherAxisXoC=0.5 FeatherOffsetXoC=0
  cross sections:
    n  RadiusFrac  shape
    0  0.20238     airfoil file "MH 114  13.02%"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 BaseThickChord=0.130507 Chord=1.48231 ThickChord=0.130507
    1  1           airfoil file "MH 114  13.02%"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 BaseThickChord=0.130507 Chord=0.234789 ThickChord=0.130507
  blade curves as in "HLProp"

Fuselage "HL_Motor", child of "HL_Spinner"
  location (X Y Z) 223.296 287.2 113.529, rotation 0 0 0; relative location 0 0 0, rotation 0 0 0
  symmetric about XZ
  bounding box size 2.64 580.76 6.36
  Design: Length=2.64
  cross sections:
    n  XLocPercent  YLocPercent  ZLocPercent  shape
    0  0            0            0            point
    1  0            0            0            circle Circle_Diameter=6.36
    2  1            0            0            as above
    3  1            0            0            point

Fuselage "HL_Motor_Controller_Interface", child of "HL_Motor"
  location (X Y Z) 225.936 287.2 113.529, rotation 0 0 0; relative location 0 0 0, rotation 0 0 0
  symmetric about XZ
  bounding box size 2.409 580.76 6.36
  Design: Length=2.409
  cross sections:
    n  XLocPercent  YLocPercent  ZLocPercent  shape
    0  0            0            0            point
    1  0            0            0            circle Circle_Diameter=6.36
    2  1            0            0            as above
    3  1            0            0            point

Fuselage "HLNacelle_12_Tail", child of "HL_Motor_Controller_Interface"
  location (X Y Z) 228.345 287.2 113.529, rotation 0 0 0; relative location 0 9.54001e-06 0, rotation 0 0 0
  symmetric about XZ
  bounding box size 21.5308 580.76 7.1576
  Design: Length=21.5002
  cross sections:
    n  XLocPercent  YLocPercent  ZLocPercent  shape
    0  0            0            0            point
    1  0            0            0            circle Circle_Diameter=6.36
    2  0.0697669    0            0            as above
    3  0.307817     0            0            as above
    4  0.995351     0            0.061127     ellipse Ellipse_Height=3.33 Ellipse_Width=0.25212
    5  1            0            0.061127     point

Stack "CruiseNacelle-Spinner", child of "MainWing"
  location (X Y Z) 212.532 114.05 113.458, rotation 0 0 0; relative location -18.4682 114.05 0.958024, rotation 0 0 0
  symmetric about XZ
  bounding box size 14.961 238.397 10.2971
  cross sections:
    n  XDelta  YDelta  ZDelta  shape
    0  0       0       0       point
    1  5       0       0       circle Circle_Diameter=7.75
    2  9.961   0       0       circle Circle_Diameter=10.2971
    3  0       0       0       point

Stack "CruiseNacelle-Motor", child of "CruiseNacelle-Spinner"
  location (X Y Z) 225.998 114.05 113.458, rotation 0 0 0; relative location 13.466 0 0, rotation 0 0 0
  symmetric about XZ
  bounding box size 10.0286 242.141 14.0408
  cross sections:
    n  XDelta  YDelta  ZDelta  shape
    0  0       0       0       point
    1  0       0       0       circle Circle_Diameter=10.3154
    2  0       0       0       circle Circle_Diameter=12.4425
    3  2.971   0       0       circle Circle_Diameter=13.8
    4  7.0576  0       0       as above
    5  0       0       0       point

Stack "CruiseNacelle-Tail", child of "CruiseNacelle-Motor"
  location (X Y Z) 235.997 114.05 113.458, rotation 0 0 0; relative location 9.99888 5.5118e-05 0, rotation 0 0 0
  symmetric about XZ
  bounding box size 45.9972 241.9 13.8
  cross sections:
    n  XDelta   YDelta  ZDelta  shape
    0  0        0       0       point
    1  0        0       0       circle Circle_Diameter=13.8
    2  7.9176   0       0       as above
    3  23.6796  0       0       circle Circle_Diameter=8.11554
    4  14.4     0       0       circle Circle_Diameter=2.29116
    5  0        0       0       point

Wing "VG", child of "CruiseNacelle-Tail"
  location (X Y Z) 237.962 106.109 115.985, rotation 0 -17 0; relative location 1.96512 -7.94106 2.5267, rotation 0 -17 0
  symmetric about XZ
  bounding box size 2.76329 216.218 1.09875
  totals: TotalSpan=4 TotalProjectedSpan=4 TotalChord=2 TotalArea=8 TotalAR=2 MAC=2.10667
  root: chord 1.2, twist 0, NACA 63-series A=0 IdealCl=0 Invert=1 ThickChord=0.1
  sections:
    n  Span  Root_Chord  Tip_Chord  Area  Sweep  Sweep_Location  Dihedral  Twist  Twist_Location  tip airfoil
    1  2     1.2         2.8        4     0      0.25            0         0      0.25            as above

Propeller "CruiseProp", child of "CruiseNacelle-Spinner"
  location (X Y Z) 224.264 114.05 113.458, rotation 0 0 0; relative location 11.7323 0 0, rotation 0 0 0
  symmetric about XZ
  bounding box size 3.19478 288.1 60.1366
  Design: Diameter=60 NumBlade=3 Beta34=31 UseBeta34Flag=1 Feather=13.9645 Rotate=-30 Precone=0 ReverseFlag=0 FoldAngle=0 PropMode=1 AF=102.562 CLi=0 Chord=0.127709 Solidity=0.121953 ConstructXoC=0.5 FeatherAxisXoC=0.5 FeatherOffsetXoC=0
  cross sections:
    n   RadiusFrac  shape
    0   0.1         circle Circle_Diameter=2.631
    1   0.1671      as above
    2   0.2495      airfoil file "CruiseProp__slice1"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 BaseThickChord=0.540645 Chord=3.144 ThickChord=0.540645
    3   0.3318      airfoil file "CruiseProp__slice2"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 BaseThickChord=0.359517 Chord=3.63 ThickChord=0.359517
    4   0.4142      airfoil file "CruiseProp__slice3"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 BaseThickChord=0.266259 Chord=4.059 ThickChord=0.266259
    5   0.4966      airfoil file "CruiseProp__slice4"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 BaseThickChord=0.203935 Chord=4.359 ThickChord=0.203935
    6   0.579       airfoil file "CruiseProp__slice5"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 BaseThickChord=0.166562 Chord=4.527 ThickChord=0.166562
    7   0.6613      airfoil file "CruiseProp__slice6"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 BaseThickChord=0.138653 Chord=4.539 ThickChord=0.138653
    8   0.7437      airfoil file "CruiseProp__slice7"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 BaseThickChord=0.118688 Chord=4.371 ThickChord=0.118688
    9   0.8261      airfoil file "CruiseProp__slice8"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 BaseThickChord=0.103286 Chord=4.086 ThickChord=0.103285
    10  0.9084      airfoil file "CruiseProp__slice9"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 BaseThickChord=0.0930773 Chord=3.687 ThickChord=0.0930766
    11  1           airfoil file "CruiseProp__slice10"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 BaseThickChord=0.0862663 Chord=3.162 ThickChord=0.0862661
  Chord along r/R (PCHIP): 0.1: 0.0877, 0.1671: 0.0877, 0.2495: 0.1048, 0.3318: 0.121, 0.4142: 0.1353, 0.4966: 0.1453, 0.579: 0.1509, 0.6613: 0.1513, 0.7437: 0.1457, 0.8261: 0.1362, 0.9084: 0.1229, 1: 0.1054
  Twist along r/R (PCHIP): 0.1: 65, 0.1671: 55.52, 0.2495: 44.9742, 0.3318: 39.1854, 0.4142: 33.1644, 0.4966: 28.3449, 0.579: 24.1187, 0.6613: 20.3517, 0.7437: 17.2544, 0.8261: 14.5788, 0.9084: 12.1193, 1: 10.4549
  Rake along r/R (PCHIP): 0.1: 0, 0.1671: 0.00178754, 0.2495: 0.0027, 0.3318: 0.0022, 0.4142: 0.0016, 0.4966: 0, 0.579: -0.0009, 0.6613: -0.0007, 0.7437: 0.0003, 0.8261: 0.0017, 0.9084: 0.0034, 1: 0.0053
  Skew along r/R (PCHIP): 0.1: 0, 0.1671: 0, 0.2495: 0.0002, 0.3318: -0.0004, 0.4142: -0.0035, 0.4966: -0.0075, 0.579: -0.01, 0.6613: -0.0102, 0.7437: -0.0076, 0.8261: -0.0031, 0.9084: 0.0038, 1: 0.014
  Thick along r/R (linear): 0.1: 1, 0.1671: 1, 0.2495: 0.540645, 0.3318: 0.359517, 0.4142: 0.266259, 0.4966: 0.203935, 0.579: 0.166562, 0.6613: 0.138653, 0.7437: 0.118688, 0.8261: 0.103285, 0.9084: 0.0930766, 1: 0.0862661

Stack "CruiseNacelle-Spinner", child of "MainWing"
  location (X Y Z) 212.532 259.325 113.458, rotation 0 0 0; relative location -18.4682 259.325 0.958024, rotation 0 0 0
  symmetric about XZ
  bounding box size 14.961 528.947 10.2971
  cross sections:
    n  XDelta  YDelta  ZDelta  shape
    0  0       0       0       point
    1  5       0       0       circle Circle_Diameter=7.75
    2  9.961   0       0       circle Circle_Diameter=10.2971
    3  0       0       0       point

Stack "CruiseNacelle-Motor", child of "CruiseNacelle-Spinner"
  location (X Y Z) 225.998 259.325 113.458, rotation 0 0 0; relative location 13.466 0 0, rotation 0 0 0
  symmetric about XZ
  bounding box size 10.0286 532.691 14.0408
  cross sections:
    n  XDelta  YDelta  ZDelta  shape
    0  0       0       0       point
    1  0       0       0       circle Circle_Diameter=10.3154
    2  0       0       0       circle Circle_Diameter=12.4425
    3  2.971   0       0       circle Circle_Diameter=13.8
    4  7.0576  0       0       as above
    5  0       0       0       point

Stack "CruiseNacelle-Tail", child of "CruiseNacelle-Motor"
  location (X Y Z) 235.997 259.325 113.458, rotation 0 0 0; relative location 9.99888 5.5118e-05 0, rotation 0 0 0
  symmetric about XZ
  bounding box size 45.9972 532.45 13.8
  cross sections:
    n  XDelta   YDelta  ZDelta  shape
    0  0        0       0       point
    1  0        0       0       circle Circle_Diameter=13.8
    2  7.9176   0       0       as above
    3  23.6796  0       0       circle Circle_Diameter=8.11554
    4  14.4     0       0       circle Circle_Diameter=2.29116
    5  0        0       0       point

Wing "VG", child of "CruiseNacelle-Tail"
  location (X Y Z) 237.962 251.384 115.985, rotation 0 -17 0; relative location 1.96512 -7.94106 2.5267, rotation 0 -17 0
  symmetric about XZ
  bounding box size 2.76329 506.768 1.09875
  totals: TotalSpan=4 TotalProjectedSpan=4 TotalChord=2 TotalArea=8 TotalAR=2 MAC=2.10667
  root: chord 1.2, twist 0, NACA 63-series A=0 IdealCl=0 Invert=1 ThickChord=0.1
  sections:
    n  Span  Root_Chord  Tip_Chord  Area  Sweep  Sweep_Location  Dihedral  Twist  Twist_Location  tip airfoil
    1  2     1.2         2.8        4     0      0.25            0         0      0.25            as above

Propeller "CruiseProp", child of "CruiseNacelle-Spinner"
  location (X Y Z) 224.264 259.325 113.458, rotation 0 0 0; relative location 11.7323 0 0, rotation 0 0 0
  symmetric about XZ
  bounding box size 3.19478 578.65 60.1366
  Design: Diameter=60 NumBlade=3 Beta34=31 UseBeta34Flag=1 Feather=13.9645 Rotate=-30 Precone=0 ReverseFlag=0 FoldAngle=0 PropMode=1 AF=102.562 CLi=0 Chord=0.127709 Solidity=0.121953 ConstructXoC=0.5 FeatherAxisXoC=0.5 FeatherOffsetXoC=0
  cross sections:
    n   RadiusFrac  shape
    0   0.1         circle Circle_Diameter=2.631
    1   0.1671      as above
    2   0.2495      airfoil file "CruiseProp__slice1"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 BaseThickChord=0.540645 Chord=3.144 ThickChord=0.540645
    3   0.3318      airfoil file "CruiseProp__slice2"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 BaseThickChord=0.359517 Chord=3.63 ThickChord=0.359517
    4   0.4142      airfoil file "CruiseProp__slice3"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 BaseThickChord=0.266259 Chord=4.059 ThickChord=0.266259
    5   0.4966      airfoil file "CruiseProp__slice4"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 BaseThickChord=0.203935 Chord=4.359 ThickChord=0.203935
    6   0.579       airfoil file "CruiseProp__slice5"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 BaseThickChord=0.166562 Chord=4.527 ThickChord=0.166562
    7   0.6613      airfoil file "CruiseProp__slice6"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 BaseThickChord=0.138653 Chord=4.539 ThickChord=0.138653
    8   0.7437      airfoil file "CruiseProp__slice7"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 BaseThickChord=0.118688 Chord=4.371 ThickChord=0.118688
    9   0.8261      airfoil file "CruiseProp__slice8"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 BaseThickChord=0.103286 Chord=4.086 ThickChord=0.103285
    10  0.9084      airfoil file "CruiseProp__slice9"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 BaseThickChord=0.0930773 Chord=3.687 ThickChord=0.0930766
    11  1           airfoil file "CruiseProp__slice10"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 BaseThickChord=0.0862663 Chord=3.162 ThickChord=0.0862661
  blade curves as in "CruiseProp"

Wing "DiagTail", child of "Fuselage"
  location (X Y Z) 360.4 0 103.5, rotation 0 5.6 0; relative location 263.4 0 0, rotation 0 5.6 0
  symmetric about XZ
  bounding box size 68.7866 244.88 59.5133
  totals: TotalSpan=262 TotalProjectedSpan=243.769 TotalChord=55.425 TotalArea=12900 TotalAR=4.60649 MAC=51.5347
  root: chord 63.8, twist 0, NACA 5-digit CamberLoc=0.15 IdealCl=0.3 ThickChord=0.15
  sections:
    n  Span   Root_Chord  Tip_Chord  Area     Sweep  Sweep_Location  Dihedral  Twist  Twist_Location  tip airfoil
    1  17.1   63.8        63.8       1090.98  0      0               21.5      0      0.25            NACA 4-series Camber=0 CamberLoc=0.2 ThickChord=0.1
    2  113.9  63.8        30.3       5358.99  15.5   0               21.5      0      0.25            as above
  SS_Control "Ruddervator": UStart=0.5 UEnd=0.75 Length_C_Start=0.4 Length_C_End=0.4 Length_Start=25.52 Length_End=12.12 LE_Flag=0 Surf_Type=2

Wing "VentralTail", child of "Fuselage"
  location (X Y Z) 360.8 0 103.5, rotation -90 0 0; relative location 263.8 0 0, rotation -90 0 0
  bounding box size 66.927 7.38334 46.8
  totals: TotalSpan=46.8 TotalProjectedSpan=46.8 TotalChord=54.7 TotalArea=2437.56 TotalAR=0.898538 MAC=53.6606
  root: chord 61.5, twist 0, NACA 4-series Camber=0 CamberLoc=0.2 ThickChord=0.12
  sections:
    n  Span  Root_Chord  Tip_Chord  Area     Sweep  Sweep_Location  Dihedral  Twist  Twist_Location  tip airfoil
    1  14.4  61.5        61.5       885.6    0      0               0         0      0.25            NACA 4-series Camber=0 CamberLoc=0.2 ThickChord=0.1
    2  32.4  61.5        34.3       1551.96  45.2   0               0         0      0.25            as above
  SS_Control "Rudder": UStart=0.5 UEnd=0.75 Length_C_Start=0.4 Length_C_End=0.4 Length_Start=24.6 Length_End=13.72 LE_Flag=0 Surf_Type=2

Mesh "MeshGeom"
  location (X Y Z) 0 0 0, rotation 0 0 0
  bounding box size 352.8 663 91.5001
  triangle mesh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

Blank "Origin"
  location (X Y Z) 0 0 0, rotation 0 0 0
