OpenVSP model (file version 5), 7 components.
Geometry view with OpenVSP parameter names; values to 6 digits, angles in degrees, lengths in the model's unit.
Overall bounding box: X_Min=780 X_Len=4900 Y_Min=-3500 Y_Len=7000 Z_Min=-450 Z_Len=1365.71

Fuselage "FuselageGeom"
  location (X Y Z) 980 0 0, rotation 0 0 0
  bounding box size 2800 450 500
  Design: Length=2800
  cross sections:
    n  XLocPercent  YLocPercent  ZLocPercent  shape
    0  0            0            0            point
    1  0.2          0            0            general fuselage BotStr=1.4 BotTanAngle=90 CornerRad=0 Height=500 LowStr=1.4 MaxWidthLoc=0 TopStr=1.4 TopTanAngle=90 UpStr=1.4 Width=450
    2  0.5          0            0            as above
    3  0.85         0            0            general fuselage BotStr=1.4 BotTanAngle=90 CornerRad=0 Height=500 LowStr=0.83 MaxWidthLoc=0 TopStr=1.4 TopTanAngle=90 UpStr=1.4 Width=450
    4  1            0            0            general fuselage BotStr=0.83 BotTanAngle=90 CornerRad=0 Height=200 LowStr=0.83 MaxWidthLoc=0 TopStr=0.83 TopTanAngle=90 UpStr=0.83 Width=200

Wing "MainWing", child of "FuselageGeom"
  location (X Y Z) 2480 0 200, rotation 0 0 0; relative location 1500 0 200, rotation 0 0 0
  symmetric about XZ
  bounding box size 700 7000 70.0406
  totals: TotalSpan=7000 TotalProjectedSpan=7000 TotalChord=620 TotalArea=4.20309e+06 TotalAR=11.6581 MAC=619.306
  root: chord 700, twist 0, NACA 4-series Camber=0 CamberLoc=0.2 ThickChord=0.1
  sections:
    n  Span     Root_Chord  Tip_Chord  Area         Sweep  Sweep_Location  Dihedral  Twist  Twist_Location  tip airfoil
    1  1322.15  700         700        925508       0      0               0         0      0.25            as above
    2  2177.84  700         380        1.17604e+06  2.48   0               0         0      0.25            as above

Fuselage "Pod", child of "MainWing"
  location (X Y Z) 1480 1200 110, rotation 0 0 0; relative location -1000 1200 -90, rotation 0 0 0
  symmetric about XZ
  bounding box size 4200 2600 180
  Design: Length=4200
  cross sections:
    n  XLocPercent  YLocPercent  ZLocPercent  shape
    0  0            0            0            point
    1  0.0286885    0            0            general fuselage BotStr=1.4 BotTanAngle=90 CornerRad=0 Height=180 LowStr=1.4 MaxWidthLoc=0 TopStr=1.4 TopTanAngle=90 UpStr=1.4 Width=200
    2  0.71335      0            0            as above
    3  0.957707     0            0            general fuselage BotStr=1.4 BotTanAngle=90 CornerRad=0 Height=100 LowStr=1.4 MaxWidthLoc=0 TopStr=1.4 TopTanAngle=90 UpStr=1.4 Width=120
    4  1            0            0            point

Propeller "FwdLiftProp", child of "Pod"
  location (X Y Z) 1530 1200 260, rotation 0 90 0; relative location 50 0 150, rotation 0 90 0
  symmetric about XZ
  bounding box size 1500 3900 73.9958
  Design: Diameter=1500 NumBlade=2 Beta34=20 UseBeta34Flag=1 Feather=0 Rotate=-45 Precone=0 ReverseFlag=0 FoldAngle=0 PropMode=1 AF=152.507 CLi=0.54059 Chord=0.173625 Solidity=0.110533 ConstructXoC=0.5 FeatherAxisXoC=0.5 FeatherOffsetXoC=0
  cross sections:
    n  RadiusFrac  shape
    0  0           ellipse Ellipse_Height=30 Ellipse_Width=60
    1  0.4         NACA 16-series Chord=138.333 IdealCl=0.7 ThickChord=0.144074
    2  1           NACA 16-series Chord=97.5 IdealCl=0.2 ThickChord=0.03
  Chord along r/R (cubic Bezier): 0: 0.08, 0.2: 0.15, 0.4: 0.2, 0.6: 0.2, 0.716667: 0.2, 0.833333: 0.2, 0.95: 0.2, 0.966667: 0.2, 0.983333: 0.2, 1: 0.13
  Twist along r/R (PCHIP): 0: 46.75, 0.75: 20, 1: 13
  Thick along r/R (cubic Bezier): 0: 0.5, 0.1: 0.3, 0.2: 0.225, 0.3: 0.2, 0.4: 0.125, 0.5: 0.115, 0.6: 0.1, 0.733333: 0.075, 0.866667: 0.055, 1: 0.03
  CLI along r/R (cubic Bezier): 0: 0, 0.133333: 0.7, 0.266667: 0.7, 0.4: 0.7, 0.466667: 0.7, 0.533333: 0.7, 0.6: 0.7, 0.733333: 0.7, 0.866667: 0.7, 1: 0.2

Propeller "FwdLiftProp", child of "Pod"
  location (X Y Z) 4380 1200 260, rotation 0 90 0; relative location 2900 0 150, rotation 0 90 0
  symmetric about XZ
  bounding box size 1500 3900 73.9958
  Design: Diameter=1500 NumBlade=2 Beta34=20 UseBeta34Flag=1 Feather=0 Rotate=45 Precone=0 ReverseFlag=0 FoldAngle=0 PropMode=1 AF=152.507 CLi=0.54059 Chord=0.173625 Solidity=0.110533 ConstructXoC=0.5 FeatherAxisXoC=0.5 FeatherOffsetXoC=0
  cross sections:
    n  RadiusFrac  shape
    0  0           ellipse Ellipse_Height=30 Ellipse_Width=60
    1  0.4         NACA 16-series Chord=138.333 IdealCl=0.7 ThickChord=0.144074
    2  1           NACA 16-series Chord=97.5 IdealCl=0.2 ThickChord=0.03
  blade curves as in "FwdLiftProp"

Propeller "PusherProp", child of "MainWing"
  location (X Y Z) 3830 0 50, rotation 0 0 0; relative location 650 0 -150, rotation 0 0 0
  bounding box size 49.6969 1000.9 1000
  Design: Diameter=1000 NumBlade=3 Beta34=20 UseBeta34Flag=1 Feather=0 Rotate=0 Precone=0 ReverseFlag=0 FoldAngle=0 PropMode=1 AF=151.538 CLi=0.538798 Chord=0.177656 Solidity=0.169649 ConstructXoC=0.5 FeatherAxisXoC=0.5 FeatherOffsetXoC=0
  cross sections:
    n  RadiusFrac  shape
    0  0.2         ellipse Ellipse_Height=20 Ellipse_Width=40
    1  0.4         NACA 16-series Chord=83.125 IdealCl=0.7 ThickChord=0.144074
    2  1           NACA 16-series Chord=65 IdealCl=0.2 ThickChord=0.03
  Chord along r/R (cubic Bezier): 0.2: 0.08, 0.333333: 0.15, 0.466667: 0.2, 0.6: 0.2, 0.716667: 0.2, 0.833333: 0.2, 0.95: 0.2, 0.966667: 0.2, 0.983333: 0.2, 1: 0.13
  Twist along r/R (PCHIP): 0.2: 46.75, 0.75: 20, 1: 13
  Thick along r/R (cubic Bezier): 0.2: 0.5, 0.233333: 0.3, 0.266667: 0.225, 0.3: 0.2, 0.4: 0.125, 0.5: 0.115, 0.6: 0.1, 0.733333: 0.075, 0.866667: 0.055, 1: 0.03
  CLI along r/R (cubic Bezier): 0.2: 0, 0.266667: 0.7, 0.333333: 0.7, 0.4: 0.7, 0.466667: 0.7, 0.533333: 0.7, 0.6: 0.7, 0.733333: 0.7, 0.866667: 0.7, 1: 0.2

Wing "HorzTail", child of "FuselageGeom"
  location (X Y Z) 5300 0 900, rotation 0 0 0
  symmetric about XZ
  bounding box size 272 2438.48 727.498
  totals: TotalSpan=2800 TotalProjectedSpan=2424.87 TotalChord=272 TotalArea=761600 TotalAR=7.72059 MAC=272
  root: chord 272, twist 0, NACA 4-series Camber=0 CamberLoc=0.2 ThickChord=0.1
  sections:
    n  Span  Root_Chord  Tip_Chord  Area    Sweep  Sweep_Location  Dihedral  Twist  Twist_Location  tip airfoil
    1  1400  272         272        380800  0      0               -30       0      0.25            as above
