OpenVSP model (file version 5), 7 components.
Geometry view with OpenVSP parameter names; values to 6 digits, angles in degrees, lengths in the model's unit.
Overall bounding box: X_Min=0 X_Len=3081.86 Y_Min=-3872.34 Y_Len=7744.68 Z_Min=-500 Z_Len=1371.26

Fuselage "FuselageGeom"
  location (X Y Z) 0 0 0, rotation 0 0 0
  bounding box size 3000 600 673.477
  Design: Length=3000
  cross sections:
    n  XLocPercent  YLocPercent  ZLocPercent  shape
    0  0            0            0            point
    1  0.25         0            0            general fuselage BotStr=1.16 BotTanAngle=90 CornerRad=0 Height=600 LowStr=1.16 MaxWidthLoc=0 TopStr=1.16 TopTanAngle=90 UpStr=1.16 Width=600
    2  0.5          0            0            as above
    3  0.75         0            0.037037     general fuselage BotStr=1.16 BotTanAngle=90 CornerRad=0 Height=400 LowStr=1.16 MaxWidthLoc=0 TopStr=1.16 TopTanAngle=90 UpStr=1.16 Width=400
    4  1            0            0.0617284    point

Wing "MainWing", child of "FuselageGeom"
  location (X Y Z) 1100 0 100, rotation 0 0 0
  symmetric about XZ
  bounding box size 735 4850 220.588
  totals: TotalSpan=4850 TotalProjectedSpan=4850 TotalChord=735 TotalArea=3.56475e+06 TotalAR=6.59864 MAC=735
  root: chord 735, twist 0, NACA 4-series Camber=0 CamberLoc=0.2 ThickChord=0.3
  sections:
    n  Span  Root_Chord  Tip_Chord  Area         Sweep  Sweep_Location  Dihedral  Twist  Twist_Location  tip airfoil
    1  2425  735         735        1.78238e+06  0      0               0         0      0.25            NACA 4-series Camber=0 CamberLoc=0.2 ThickChord=0.25

Blank "Hinge", child of "MainWing"
  location (X Y Z) 1350 2570 100, rotation 0 0 0; relative location 250 2570 0, rotation 0 0 0

Fuselage "Nacelle", child of "Hinge"
  location (X Y Z) 1350 2570 800, rotation 0 90 0; relative location 0 0 700, rotation 0 90 0
  symmetric about XZ
  bounding box size 300 5440 1300
  Design: Length=1300
  cross sections:
    n  XLocPercent  YLocPercent  ZLocPercent  shape
    0  0            0            0            point
    1  0.197531     0            0            ellipse Ellipse_Height=250 Ellipse_Width=275
    2  0.5          0            0            ellipse Ellipse_Height=300 Ellipse_Width=300
    3  0.75         0            0            ellipse Ellipse_Height=275 Ellipse_Width=275
    4  1            0            0            general fuselage BotStr=0.83 BotTanAngle=90 CornerRad=0 Height=150 LowStr=0.83 MaxWidthLoc=0 TopStr=0.83 TopTanAngle=90 UpStr=0.83 Width=150

Propeller "PropGeom", child of "Nacelle"
  location (X Y Z) 1350 2570 500, rotation 0 90 0; relative location 0 0 -300, rotation 0 90 0
  symmetric about XZ
  bounding box size 2336.22 7744.68 128.371
  Design: Diameter=2600 NumBlade=3 Beta34=20 UseBeta34Flag=1 Feather=0 Rotate=0 Precone=0 ReverseFlag=0 FoldAngle=0 PropMode=0 AF=152.158 CLi=0.540239 Chord=0.175417 Solidity=0.167511 ConstructXoC=0.5 FeatherAxisXoC=0.5 FeatherOffsetXoC=0
  cross sections:
    n  RadiusFrac  shape
    0  0.1         ellipse Ellipse_Height=52 Ellipse_Width=104
    1  0.4         NACA 16-series Chord=231.296 IdealCl=0.7 ThickChord=0.144074
    2  1           NACA 16-series Chord=169 IdealCl=0.2 ThickChord=0.03
  Chord along r/R (cubic Bezier): 0.1: 0.08, 0.266667: 0.15, 0.433333: 0.2, 0.6: 0.2, 0.716667: 0.2, 0.833333: 0.2, 0.95: 0.2, 0.966667: 0.2, 0.983333: 0.2, 1: 0.13
  Twist along r/R (PCHIP): 0.1: 46.75, 0.75: 20, 1: 13
  Thick along r/R (cubic Bezier): 0.1: 0.5, 0.166667: 0.3, 0.233333: 0.225, 0.3: 0.2, 0.4: 0.125, 0.5: 0.115, 0.6: 0.1, 0.733333: 0.075, 0.866667: 0.055, 1: 0.03
  CLI along r/R (cubic Bezier): 0.1: 0, 0.2: 0.7, 0.3: 0.7, 0.4: 0.7, 0.466667: 0.7, 0.533333: 0.7, 0.6: 0.7, 0.733333: 0.7, 0.866667: 0.7, 1: 0.2

Wing "Vtail", child of "FuselageGeom"
  location (X Y Z) 2400 0 150, rotation 90 0 0
  bounding box size 679.779 60.0348 700
  totals: TotalSpan=700 TotalProjectedSpan=700 TotalChord=512.5 TotalArea=358750 TotalAR=1.36585 MAC=517.48
  root: chord 600, twist 0, NACA 4-series Camber=0 CamberLoc=0.2 ThickChord=0.1
  sections:
    n  Span  Root_Chord  Tip_Chord  Area    Sweep  Sweep_Location  Dihedral  Twist  Twist_Location  tip airfoil
    1  700   600         425        358750  20     0               0         0      0.25            as above

Wing "Htail", child of "Vtail"
  location (X Y Z) 2650 0 850, rotation 0 0 0; relative location 250 0 700, rotation 0 0 0
  symmetric about XZ
  bounding box size 431.863 2100 42.5247
  totals: TotalSpan=2100 TotalProjectedSpan=2100 TotalChord=382.5 TotalArea=803250 TotalAR=5.4902 MAC=384.074
  root: chord 425, twist 0, NACA 4-series Camber=0 CamberLoc=0.2 ThickChord=0.1
  sections:
    n  Span  Root_Chord  Tip_Chord  Area    Sweep  Sweep_Location  Dihedral  Twist  Twist_Location  tip airfoil
    1  1050  425         340        401625  5      0               0         0      0.25            as above
